Thu 29 Sep 2022 04:47:24 PM UTC
;;execute NONMEM/pk2cpt.mod -dir NONMEM/pk2cpt
$PROBLEM    pk2cpt Bayesian model
$DATA      pk2cpt.csv IGNORE=@
$INPUT      TIME ID II EVID DV CMT ADDL AMT
$SUBROUTINE ADVAN4 TRANS4 ;; 2-comp with first order absorption
$PK
  TVKA = THETA(5)
  KA = TVKA

  TVCL = THETA(1)
  CL = TVCL
  MU_1 = LOG(TVCL)

  TVV2  = THETA(3)
  V2 = TVV2
  MU_2 = LOG(TVV2)

  TVQ = THETA(2)
  Q = TVQ

  TVV3  = THETA(4)
  V3 = TVV3

  S2 = V2  ;; Scaling compartment (check units of dose and observations)

$THETA  (0,7.4367958406427) ; 1 CL
 (0,28.0799996152587) ; 2 Q
 (0,78.4460632446725) ; 3 Vc
 (0,68.1255965629187) ; 4 Vp
 (0,1.0811298754049) ; 5 Ka
$OMEGA  0.0  FIX  ;             ;     IIV-CL
 0.0  FIX  ;          _  ;      IIV-V
$SIGMA  0.589695154260051  ; residual variability
      ;; we are dealing them in the THETA block
$ERROR  	;; Calculation based on linear (non log-transformed) data
  IPRED = F
  Y= IPRED+ERR(1)

$ESTIMATION MAXEVAL=99999 SIG=3 PRINT=5 NOABORT INTERACTION ;; Estimation method
$COVARIANCE PRINT=E UNCONDITIONAL

NM-TRAN MESSAGES
 WARNINGS AND ERRORS (IF ANY) FOR PROBLEM    1
 (WARNING  2) NM-TRAN INFERS THAT THE DATA ARE POPULATION.
 (WARNING  46) ETA VARIABLES ARE NOT USED, BUT DATA ARE POPULATION TYPE.
 (MU_WARNING 18) MU_001: USED ON THE RIGHT BUT NOT WITH AN ETA.
 (MU_WARNING 18) MU_002: USED ON THE RIGHT BUT NOT WITH AN ETA.
Note: Analytical 2nd Derivatives are constructed in FSUBS but are never used.
      You may insert $ABBR DERIV2=NO after the first $PROB to save FSUBS construction and compilation time

1NONLINEAR MIXED EFFECTS MODEL PROGRAM (NONMEM) VERSION 7.5.1
 ORIGINALLY DEVELOPED BY STUART BEAL, LEWIS SHEINER, AND ALISON BOECKMANN
 CURRENT DEVELOPERS ARE ROBERT BAUER, ICON DEVELOPMENT SOLUTIONS,
 AND ALISON BOECKMANN. IMPLEMENTATION, EFFICIENCY, AND STANDARDIZATION
 PERFORMED BY NOUS INFOSYSTEMS.
 PROBLEM NO.:         1
 pk2cpt Bayesian model
 TOT. NO. OF OBS RECS:       53
 TOT. NO. OF INDIVIDUALS:        1
 TWO COMPARTMENT MODEL WITH FIRST-ORDER ABSORPTION (ADVAN4)
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 #TBLN:      1
 #METH: First Order with Interaction
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
 #TERM:
0MINIMIZATION SUCCESSFUL
 NO. OF FUNCTION EVALUATIONS USED:      367
 NO. OF SIG. DIGITS IN FINAL EST.:  3.5
0PARAMETER ESTIMATE IS NEAR ITS BOUNDARY

 TOTAL DATA POINTS NORMALLY DISTRIBUTED (N):           53
 N*LOG(2PI) CONSTANT TO OBJECTIVE FUNCTION:    97.407484519695302
 OBJECTIVE FUNCTION VALUE WITHOUT CONSTANT:    640.88340479594046
 OBJECTIVE FUNCTION VALUE WITH CONSTANT:       738.29088931563581
 REPORTED OBJECTIVE FUNCTION DOES NOT CONTAIN CONSTANT

 TOTAL EFFECTIVE ETAS (NIND*NETA):                             0


 #TERE:
 Elapsed estimation  time in seconds:     0.17
0R MATRIX ALGORITHMICALLY SINGULAR
0COVARIANCE MATRIX UNOBTAINABLE
0R MATRIX IS OUTPUT
0S MATRIX ALGORITHMICALLY SINGULAR
0S MATRIX IS OUTPUT
0T MATRIX - EQUAL TO RS*RMAT, WHERE S* IS A PSEUDO INVERSE OF S - IS OUTPUT
 Elapsed covariance  time in seconds:     0.05
 Elapsed postprocess time in seconds:     0.00

 ********************                           FIRST ORDER WITH INTERACTION                         ********************
 #OBJT:**************                       MINIMUM VALUE OF OBJECTIVE FUNCTION                      ********************
 #OBJV:********************************************      640.883       **************************************************

 ********************                           FIRST ORDER WITH INTERACTION                         ********************
 ********************                             FINAL PARAMETER ESTIMATE                           ********************

 THETA - VECTOR OF FIXED EFFECTS PARAMETERS   *********
         TH 1      TH 2      TH 3      TH 4      TH 5
         4.84E+00  2.81E-01  3.84E+01  1.20E+01  2.68E+00

 OMEGA - COV MATRIX FOR RANDOM EFFECTS - ETAS  ********
         ETA1      ETA2
 ETA1
+        0.00E+00
 ETA2
+        0.00E+00  0.00E+00

 SIGMA - COV MATRIX FOR RANDOM EFFECTS - EPSILONS  ****
         EPS1
 EPS1
+        6.57E+04

 OMEGA - CORR MATRIX FOR RANDOM EFFECTS - ETAS  *******
         ETA1      ETA2
 ETA1
+        0.00E+00
 ETA2
+        0.00E+00  0.00E+00

 SIGMA - CORR MATRIX FOR RANDOM EFFECTS - EPSILONS  ***
         EPS1
 EPS1
+        2.56E+02
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 Elapsed finaloutput time in seconds:     0.01
 #CPUT: Total CPU Time in Seconds,        0.177
